// COMSOL Multiphysics 5.5.0.292 model "unitCell_validation.mph"
// TwoSquare2D2
// Outline of the model tree

Parameters
  L1 = 0.1[m]  // Periodic cell length
  L2 = 0.1[m]  // Periodic cell height
  Rout = (.06/2) [m]  // Size of outer material
  Rin = (.02/2) [m]  // Radius of inner material
  numEigs = 6  // Number of Eigenfruequencies/Bands
  E1 = 1e6[N/m^2]  // Modulus of Material 1
  E2 = 2.1e11[N/m^2]  // Modulus of Material 2
  E3 = 2.1e11[N/m^2]  // Modulus of Material 3
  Rho1 = 1100[kg/m^3]  // Density of Material 1
  Rho2 = 7850[kg/m^3]  // Density of Material 2
  Rho3 = 7850[kg/m^3]  // Density of Material 3
  Poisson1 = 0.47  // Poisson ratio of Material 1
  Poisson2 = 0.30  // Poisson ratio of Material 2
  Poisson3 = 0.30  // Poisson ratio of Material 3
  k = 1  // 0-3 spans irreducible Brillouin zone (0-1 horizontal, 1-2 vertical, 2-3 diagonal)
  kx = if(k<1,pi/L1*k,if(k<2,pi/L1,(3-k)*pi/L1))  // X component of wave number
  ky = if(k<1,0,if(k<2,(k-1)*pi/L1,(3-k)*pi/L1))  // Y component of wave number

Selections
  solid_dst_pc1: Explicit "Destination selection for 'Periodic Condition 1'" on boundaries 4
  solid_dst_pc2: Explicit "Destination selection for 'Periodic Condition 2'" on boundaries 3

Geometry
  geom1 "Geometry 1" (2D, length unit m)
    r1: Rectangle | base = center; size = {L2, L1}
    c1: Circle | r = Rout
    c2: Circle | r = Rin
    fin: Finalize "Form Union"

Materials
  mat3: Common "Material 1" on domains 1
    def "Basic"
      youngsmodulus = E1
      poissonsratio = Poisson1
      density = Rho1
  mat4: Common "Material 2" on domains 2
    def "Basic"
      youngsmodulus = E2
      poissonsratio = Poisson2
      density = Rho2
  mat6: Common "Material 3" on domains 3
    def "Basic"
      youngsmodulus = E3
      poissonsratio = Poisson3
      density = Rho3

Physics
  solid: SolidMechanics on domains 1-3
    dependent variable u = {u, v, w}
    ShapeProperty.order_displacement = 2
    Type2D.ModeExtension = 0
    lemm1: LinearElasticModel "Linear Elastic Material Model 1" (default) | minput_strainreferencetemperature = 0
    free1: Free (default)
    init1: init "Initial Values 1" (default)
    pc1: PeriodicCondition on boundaries 1, 4
      PeriodicType = Floquet
      kFloquet = {kx, ky, 0}
      destinationDomains: boundaries 4
      dd1: DestinationDomains "Destination Selection 1" on all boundaries
    pc2: PeriodicCondition on boundaries 2, 3
      PeriodicType = Floquet
      kFloquet = {kx, ky, 0}
      destinationDomains: boundaries 3
      dd1: DestinationDomains "Destination Selection 1" on boundaries 3

Mesh
  mesh1 "Mesh 1"
    ftri1: FreeTri "Free Triangular 1" (disabled) on remaining entities
    fq1: FreeQuad on remaining entities

Studies
  std2 "Study 1"
    param1: Parametric "Parametric Sweep 1" | pname = k; plistarr = range(0,3/36,3)
    eig: Eigenfrequency | neigs = numEigs; discretization = {solid, physics}

Solver configurations
  sol1 "Solution 1" (study std2)
    v1: Variables "Dependent Variables 1"
    e1: Eigenvalue "Eigenvalue Solver 1" | eigvfunscale = maximum; eigvfunscaleparam = 1.41e-07
      dDef: Direct
  sol2 "Parametric Solutions 1" (study std2)

Datasets
  dset5: Solution | solution = none
  dset6: Solution | solution = sol1
  dset7: Solution | solution = sol2

Plots
  pg8: PlotGroup2D "Mode Shape (solid)" | data = dset7
    surf1: Surface | expr = (solid.disp)
      def: Deform "Deformation" | expr = {u, v}; descr = Displacement field (Material)
  pg7: PlotGroup1D "Phononic Band Structure"
    data = dset7
    title = Phononic Band Diagram
    xlabel = Wellenvektor k
    ylabel = Frequenz f [Hz]
    manualgrid = on
    yspacing = 20
    glob1: Global | expr = solid.freq; unit = Hz; descr = Frequency; xdata = expr; xdataexpr = k